w_scr := 1024
h_scr := 768
fov_vert := 45*π/180 float → 0.785398163397
# Координаты вершины в пространстве камеры (точка схода - в нуле).
h_proj_plane := 1
d := 1/tan(fov_vert/2) float → 2.41421356237
v_x := -4
v_y := 1
r := w_scr/h_scr float → 1.33333333333
v_z := -6.5 - 2.4142 → -8.9142
v_x' := v_x*d/(-v_z) → -1.08331137393
v_y' := v_y*d/(-v_z) → 0.270827843483
# Координата y уже нормализована и лежит в [-1,1], т.к. высота проективной плоскости равна двум.
v_y_ndc' := v_y' → 0.270827843483
v_x_ndc' := v_x'/r → -0.812483530448
# Для координаты x мы выбираем ширину проективной плоскости r*2 такую, чтобы после нормализации и "растягивания" до экранных координат, отношение между x и y было таким же, как и в пределах проективной плоскости. В соседнем файле есть подробный разбор, почему ширина проективного "окна" должна быть равна двойному аспекту r=w/h.
# Финальный вид уравнений для нормализованных координат проекции.
v_x_ndc' := v_x*d/(r*(-v_z)) → -0.812483530448
v_y_ndc' := v_y*d/(-v_z) → 0.270827843483
# Мы хотим вычислять эти координаты через умножение вершины на матрицу. При этом мы хотим получить на выходе нормализованную координату z.
# Через матрицу можем вычислить только линейную часть уравнения, деление на z выполняем уже для преобразованного вектора.
#
# Для x и y мы хотим получить такой элемент me_x и me_y матрицы, что
v_x*me_x/(-v_z) == v_x*d/(r*(-v_z))
v_y*me_y/(-v_z) == v_y*d/(-v_z)
# Поэтому
me_x == d/r == 1/(r*tan(fov_vert/2))
me_y == d == 1/tan(fov_vert/2)
n := -2
f := -8
A := f/(f - n)
B := -f*n/(f - n)  # Сейчас любая координата z преобразуется так (с учетом перспективного деления):
M_proj := [1/(r*tan(fov_vert/2)), 0, 0, 0; 0, 1/tan(fov_vert/2), 0, 0; 0, 0, A, B; 0, 0, -1, 0]
g(z) := (z*A + B)/z
# Нам нужно подобрать такие A и B, чтобы:
# [plot: g(z) vs z]
g(n) := A + B/n == 0
g(f) := A + B/f == 1
# То есть, чтобы все z на ближней плоскости мапились в ноль, а на дальней - в единицу
v := [v_x; v_y; v_z; 1]
# Из первого условия следует, что:
A == -B/n
# Тогда с учетом второго условия:
-B/n + B/f == 1
# В последнем элементе мы получаeм -z
v' := M_proj*v → [-7.24264068712; 2.41421356237; -9.21893333333; 8.9142]
v'_ndc := v'/v'[3] → [-0.812483530448; 0.270827843483; -1.03418515776; 1.0]
v'_ndc[0] == v_x_ndc' → 1
v'_ndc[1] == v_y_ndc' → 1
V := [w_scr/2, 0, 0, w_scr/2; 0, h_scr/2, 0, h_scr/2; 0, 0, 1, 0; 0, 0, 0, 1]
V*v'_ndc → [96.0084324106; 487.997891897; -1.03418515776; 1.0]
