v_in := [1; 1; -11]
v_out_1 := [-1; 1; -9]
v_out_2 := [1; 1; -9]
near_clipping_plane_z := -10
v_in_out1 := v_out_1 - v_in float → [-2.0; 0.0; 2.0]  # Вектор из точки v_in в точку v_out_1
# Параметрическое уравнение прямой в векторной форме | В разложении по компонентам
line_in_out1(t) := v_in + v_in_out1*t
v_in_x := v_in[0] → 1
v_in_out1_x := v_in_out1[0] → -2.0
v_out_1_x := v_out_1[0] → -1
line_in_out1(0) == v_in → 1
v_in_y := v_in[1] → 1
v_in_out1_y := v_in_out1[1] → 0.0
v_out_1_y := v_out_1[1] → 1
line_in_out1(1) == v_out_1 → 1
v_in_z := v_in[2] → -11
v_in_out1_z := v_in_out1[2] → 2.0
v_out_1_z := v_out_1[2] → -9
line_in_out1_x(t) := v_in_x + v_in_out1_x*t
line_in_out1_x(0) == v_in_x → 1
line_in_out1_x(1) == v_out_1_x → 1
line_in_out1_y(t) := v_in_y + v_in_out1_y*t
line_in_out1_y(0) == v_in_y → 1
line_in_out1_y(1) == v_out_1_y → 1
line_in_out1_z(t) := v_in_z + v_in_out1_z*t
line_in_out1_z(0) == v_in_z → 1
line_in_out1_z(1) == v_out_1_z → 1
t := v_in_z + v_in_out1_z*t == near_clipping_plane_z solve, t → 0.5
intersection_1_x := line_in_out1_x(t) → 0.0
intersection_1_y := line_in_out1_y(t) → 1.0
intersection_1_z := near_clipping_plane_z → -10
