x_0 := 1.8155
x_1 := 3.6276
x_0_int := round(x_0) → 2
x_1_int := round(x_1) → 4
y_0 := 1.0214
y_1 := 1.651
y_0_int := round(y_0) → 1
y_1_int := round(y_1) → 2
dy := y_1_int - y_0_int → 1
dx := x_1_int - x_0_int → 2
(|dy| ≤ |dx|) and (x_1_int > x_0_int) → 1
(|dy| > |dx|) and (y_1_int > y_0_int) → 0
slope := dy/dx float → 0.5
x_0 := 1.7109
x_1 := 3.375
x_0_int := round(x_0) → 2
x_1_int := round(x_1) → 3
y_0 := -0.6499
y_1 := -1.4323
y_0_int := round(y_0) → -1
y_1_int := round(y_1) → -1
dy := y_1_int - y_0_int → 0
dx := x_1_int - x_0_int → 1
(|dy| ≤ |dx|) and (x_1_int > x_0_int) → 1
(|dy| > |dx|) and (y_1_int > y_0_int) → 0
slope := dy/dx float → 0.0
x_0 := 2.1471
x_1 := 3.6471
x_0_int := round(x_0) → 2
x_1_int := round(x_1) → 4
y_0 := 0.4706
y_1 := 0.4706
y_0_int := round(y_0) → 0
y_1_int := round(y_1) → 0
dy := y_1_int - y_0_int → 0
dx := x_1_int - x_0_int → 2
(|dy| ≤ |dx|) and (x_1_int > x_0_int) → 1
(|dy| > |dx|) and (y_1_int > y_0_int) → 0
slope := dy/dx float → 0.0
