w := 800
h := 600
r := w/h float → 1.33333333333
proj_win_h_half := 1
proj_win_w_half := r → 1.33333333333
fov_v := 45*(π/180) float → 0.785398163397
d := 1/d == tan(fov_v/2) solve, d → 2.41421356237
half_tan_fov_h := proj_win_w_half/d == half_tan_fov_h solve, half_tan_fov_h → 0.552284749831
fov_h := 2*atan(half_tan_fov_h) → 1.00919128997
tri_0_v_0 := [0.128585119929; 0.0901472720147; -3.06213539473; 1]
tri_0_v_1 := [0; 0.1; -4; 1]
tri_0_v_2 := [-0.00179401197252; -0.013699806553; -6.56713032024; 1]
tri_1_v_0 := [0.0534872008388; 0.133990727781; -3.68403787432; 1]
tri_1_v_1 := [-0.0275065133871; -0.0344751760566; -3.72243758385; 1]
tri_1_v_2 := [0.0851704697012; 0.00457807936321; -5.04979942087; 1]
# Итоговая матрица перспективной проекции
n := 0.1
f := 10
A := f/(f - n)
B := -n*f/(f - n)
M_proj := [1/(r*tan(fov_v/2)), 0, 0, 0; 0, 1/tan(fov_v/2), 0, 0; 0, 0, -A, B; 0, 0, -1, 0]
tri_0_v_0_clip := M_proj*tri_0_v_0 → [0.232823955339; 0.217634766709; 2.99205595428; 3.06213539473]
tri_0_v_0_ndc := tri_0_v_0_clip/tri_0_v_0_clip[3] → [0.0760332007981; 0.0710728751848; 0.977114192737; 1.0]
tri_0_v_1_clip := M_proj*tri_0_v_1 → [0.0; 0.241421356237; 3.93939393939; 4.0]
tri_0_v_1_ndc := tri_0_v_1_clip/tri_0_v_1_clip[3] → [0.0; 0.0603553390593; 0.984848484848; 1.0]
tri_0_v_2_clip := M_proj*tri_0_v_2 → [-0.00324834602634; -0.0330742587822; 6.53245486893; 6.56713032024]
tri_0_v_2_ndc := tri_0_v_2_clip/tri_0_v_2_clip[3] → [-0.000494637058797; -0.00503633355352; 0.994719847236; 1.0]
tri_1_v_0_clip := M_proj*tri_1_v_0 → [0.0968471442588; 0.323482232241; 3.62024027709; 3.68403787432]
tri_1_v_0_ndc := tri_1_v_0_clip/tri_1_v_0_clip[3] → [0.026288313954; 0.0878064350249; 0.982682697788; 1.0]
tri_1_v_1_clip := M_proj*tri_1_v_1 → [-0.0498049482546; -0.083230437601; 3.65902786248; 3.72243758385]
tri_1_v_1_ndc := tri_1_v_1_clip/tri_1_v_1_clip[3] → [-0.0133796597344; -0.02235912241; 0.982965538052; 1.0]
tri_1_v_2_clip := M_proj*tri_1_v_2 → [0.1542147773; 0.0110524612883; 4.99979739482; 5.04979942087]
tri_1_v_2_ndc := tri_1_v_2_clip/tri_1_v_2_clip[3] → [0.0305387926226; 0.00218869312761; 0.990098215417; 1.0]
# Переводим вершины в экранное пространство (построение матрицы см. в /docs/persp_proj.mcdx)
B := (w - 1)/2
A := B
D := (h - 1)/2
C := -(h - 1)/2
M_viewport := [A, 0, 0, B; 0, C, 0, D; 0, 0, 1, 0; 0, 0, 0, 1]
tri_0_v_0_screen := M_viewport*tri_0_v_0_ndc → [429.875263719; 278.213673882; 0.977114192737; 1.0]
tri_0_v_1_screen := M_viewport*tri_0_v_1_ndc → [399.5; 281.423575952; 0.984848484848; 1.0]
tri_0_v_2_screen := M_viewport*tri_0_v_2_ndc → [399.302392495; 301.008381899; 0.994719847236; 1.0]
tri_1_v_0_screen := M_viewport*tri_1_v_0_ndc → [410.002181425; 273.20197271; 0.982682697788; 1.0]
tri_1_v_1_screen := M_viewport*tri_1_v_1_ndc → [394.154825936; 306.196557162; 0.982965538052; 1.0]
tri_1_v_2_screen := M_viewport*tri_1_v_2_ndc → [411.700247653; 298.844486408; 0.990098215417; 1.0]
# При линейной интерполяции нелинейно нормализованного z до точки пересечения, мы получаем точно такой же z, который даст нелинейная нормализация z точки пересечения в мировом пространстве
intersec := [0.119328624711; 0.0827744664735; -3.31097865894; 1]
intersec_clip := M_proj*intersec → [0.216063588117; 0.199835239578; 3.24341278681; 3.31097865894]
intersec_ndc := intersec_clip/intersec_clip[3] → [0.0652567142148; 0.0603553390593; 0.979593383379; 1.0]
intersec_screen := M_viewport*intersec_ndc → [425.570057329; 281.423575952; 0.979593383379; 1.0]
